$PROBLEM EXAMPLINIB1
$INPUT ID TIME EVID AMT CMT SS II DV S2_SAMPLING
$DATA data.csv IGNORE=@
$SUBROUTINES ADVAN13 TOL=8

$MODEL
COMP=(DEPOT1) ; 1
COMP=(CENTRAL) ; 2
COMP=(AUC) ; 3

$ABBREVIATED COMRES = 2

$PK
iETA1 = 0
iETA2 = 0
iETA3 = 0
iETA4 = 0
ETCL  = ETA(1) + iETA1 ; CL
ETVC  = ETA(2) + iETA2 ; VC
ETKA  = ETA(3) + iETA3 ; KA
ETF1  = ETA(4) + iETA4 ; F1

TVCL  = THETA(1) ; 4.0
TVVC  = THETA(2) ; 70.0
TVKA  = THETA(3) ; 1.0
TVF1  = THETA(4) ; .5

CL  = TVCL * EXP(ETCL)
VC  = TVVC * EXP(ETVC)
KA  = TVKA * EXP(ETKA)
LF1 = LOG(TVF1 / ( 1 - TVF1))
F1  = EXP(LF1+ETF1)/(1+EXP(LF1+ETF1))

K20 = CL / VC

S2 = VC/1000 ; dv in µg/l ; amt in mg


IF(NEWIND.LE.1) THEN ; assign negative Cmax Tmax for the new subject
  COM(1)=-1 ; holder of Tmax
  COM(2) = -1 ; holder of Cmax
ENDIF

A_0(3) = 0


$DES
DADT(1) = -KA * A(1)
DADT(2) =  KA * A(1) - K20*A(2)
DADT(3) = A(2)/S2

CC = A(2)/S2


IF (S2_SAMPLING.GE.30) THEN
   TDOSE = 216
ELSE
   TDOSE = 0
ENDIF

IF(CC.GT.COM(1).AND.T.GE.TDOSE) THEN
   COM(1)=CC
   COM(2)=T
ENDIF


$ERROR
CMAX	= COM(1)
IF (S2_SAMPLING.GE.30) THEN
   TMAX = COM(2) - 216
ELSE
   TMAX = COM(2)
ENDIF

AUC = A(3)


DEL=0
IF (F.EQ.0) DEL=1
W=(F+DEL) * THETA(5)
Y=F+W*EPS(1)
IPRED=F
IRES=DV-IPRED
IWRES=IRES/W

$THETA
4 ; CL
70 ; V
1 ; KA
0.5 ; F
0.22 ; err prop

$OMEGA STANDARD CORRELATION BLOCK(4)
0.45 ; CL
0 0.45 ; VC
0 0 0.45 ; KA
0 0 0 0.45 ; F1

$SIGMA 1 FIX


;$SIM ONLYSIM (12345 NEW) SUBPROBLEM=1
$EST METHOD=1 INTER MAXEVAL=0 NOABORT SIG=3 PRINT=1 POSTHOC

$TABLE ID TIME EVID DV S2_SAMPLING PRED IPRED CL VC KA F1 ETA1 ETA2 ETA3 ETA4 AUC CMAX TMAX NOPRINT NOAPPEND ONEHEADER FILE=run008.tab FORMAT=,
