$PROBLEM EXAMPLINIB1
$INPUT ID TIME EVID AMT CMT SS II DV S2_SAMPLING bodyweight sex
$DATA data.csv IGNORE=@
$SUBROUTINES ADVAN13 TOL=8

$MODEL
COMP=(DEPOT) ; 1
COMP=(CENTRAL) ; 2
COMP=(PERIPH) ; 3
COMP=(AUC) ; 4

$ABBREVIATED COMRES = 2

$PK
iETA1 = 0
iETA2 = 0
iETA3 = 0
iETA4 = 0

TVCL   =  THETA(1) ; 4.0
TVVC   =  THETA(2) ; 70.0
TVKA   =  THETA(3) ; 1.0
TVVP   =  THETA(4) ; 50.0
TVQ = THETA(5) ; 4.0


IF(ICALL == 4) THEN
	CL    = TVCL  * EXP(ETA(1)) * ((bodyweight/75)**1.5) * (0.75**sex)
	VC    = TVVC  * EXP(ETA(2))

	VP    = TVVP  * EXP(ETA(4))
	Q     = TVQ

	K23 = Q / VC
	K32 = Q / VP
	K20 = CL / VC

	A0 = K20 * K32
	A1 = -(K23 + K32 + K20)

	L1 = (- A1 + SQRT(A1*A1 - 4*A0))/2
	L2 = (- A1 - SQRT(A1*A1-4*A0))/2

	HALFLIFE1 = LOG(2)/L1
	HALFLIFE2 = LOG(2)/L2

	DOWHILE (HALFLIFE1.GT.25.OR.HALFLIFE2.GT.125.OR.HALFLIFE1.LT.1.OR.HALFLIFE2.LT.5) ; 5x "true" half life
		CALL SIMETA(ETA)

		CL    = TVCL  * EXP(ETA(1)) * ((bodyweight/75)**1.5) * (0.75**sex)
		VC    = TVVC  * EXP(ETA(2))

		VP    = TVVP  * EXP(ETA(4))
		Q     = TVQ

		K23 = Q / VC
		K32 = Q / VP
		K20 = CL / VC

		A0 = K20 * K32
		A1 = -(K23 + K32 + K20)

		L1 = (- A1 + SQRT(A1*A1 - 4*A0))/2
		L2 = (- A1 - SQRT(A1*A1-4*A0))/2

		HALFLIFE1 = LOG(2)/L1
		HALFLIFE2 = LOG(2)/L2

	ENDDO
ENDIF


KA    = TVKA  * EXP(ETA(3))


S2 = VC/1000 ; dv in µg/l ; amt in mg


IF(NEWIND.LE.1) THEN ; assign negative Cmax Tmax for the new subject
  COM(1)=-1 ; holder of Cmax
  COM(2)=-1 ; holder of Tmax
ENDIF

A_0(4) = 0


$DES
DADT(1) = -KA * A(1)
DADT(2) =  KA * A(1) - K20*A(2) - K23 * A(2) + K32 * A(3)
DADT(3) = K23 * A(2) - K32 * A(3)
DADT(4) = A(2)/S2

CC = A(2)/S2

IF (S2_SAMPLING.GE.30) THEN
   TDOSE = 216
ELSE
   TDOSE = 0
ENDIF

IF(CC.GT.COM(1).AND.T.GE.TDOSE) THEN
   COM(1)=CC
   COM(2)=T
ENDIF


$ERROR
CMAX	= COM(1)
IF (S2_SAMPLING.GE.30) THEN
   TMAX = COM(2) - 216
ELSE
   TMAX = COM(2)
ENDIF

AUC = A(4)

DEL=0
IF (F.EQ.0) DEL=1
W=(F+DEL)*THETA(6)
Y=F+W*ETA(5)
IPRED=F
IRES=DV-IPRED
IWRES=IRES/W

$THETA
4 ; CL
70 ; V
1 ; KA
50 ; V2
4 ; Q
0.22 ; err prop

$OMEGA STANDARD CORRELATION BLOCK(4)
0.45 ; CL
0 0.45 ; VC
0 0 0.45 ; KA
0 0 0 0.45 ; VP

$OMEGA 1 FIX

$SIGMA
0 FIX    ; prop


$SIM ONLYSIM (12345 NEW) SUBPROBLEM=1


$TABLE ID TIME EVID DV S2_SAMPLING PRED IPRED CL VC KA VP Q ETA1 ETA2 ETA3 ETA4 ETA5 AUC CMAX TMAX NOPRINT NOAPPEND ONEHEADER FILE=run101.tab FORMAT=,
