$PROBLEM EXAMPLINIB1
$INPUT ID TIME EVID AMT CMT SS II DV S2_SAMPLING
$DATA data.csv IGNORE=@
$SUBROUTINES ADVAN13 TOL=8

$MODEL
COMP=(DEPOT) ; 1
COMP=(CENTRAL) ; 2
COMP=(PERIPH) ; 3
COMP=(PERIP) ; 4
COMP=(AUC) ; 5

$ABBREVIATED COMRES = 2

$PK
iETA1 = 0
iETA2 = 0
iETA3 = 0
iETA4 = 0
iETA5 = 0
iETA6 = 0
iETA7 = 0

TVCL   =  THETA(1) ; 4.0
TVVC   =  THETA(2) ; 70.0
TVKA   =  THETA(3) ; 1.0
TVVP   =  THETA(4) ; 50.0
TVQ = THETA(5) ; 4.0
TVV3 = THETA(6) ; 30
TVQ3 = THETA(7) ; 4


IF(ICALL == 4) THEN
	CL    = TVCL  * EXP(ETA(1))
	VC    = TVVC  * EXP(ETA(2))

	VP    = TVVP  * EXP(ETA(4))
	Q     = TVQ  * EXP(ETA(6))

	V3 = TVV3 * EXP(ETA(5))
	Q3 = TVQ3  * EXP(ETA(7))

	K23 = Q / VC
	K32 = Q / VP

	K24 = Q3 / VC
	K42 = Q3 / V3

	K20 = CL / VC

	a0 = K20 * K32 * K42
	a1 = K20 * K42 + K32 * K42 + K32 * K24 + K20 * K32 + K42 * K23
	a2 = K20 + K23 + K24 + K32 + K42

	p1 = a1 - (a2 * a2/3)
	q1 = (2 * a2 * a2 * a2 /27) - (a1 * a2/3) + a0
	r_1 = SQRT(-(p1*p1*p1)/27)
	phi = ACOS((-q1/2)/r_1)/3
	r_2 = 2* EXP(LOG(r_1)/3)

	root1 = -(COS(phi)*r_2-a2/3)
	root2 = -(COS(phi+2*3.141593/3)*r_2-a2/3)
	root3 = -(COS(phi+4*3.141593/3)*r_2-a2/3)

	l1 = root1
	IF(root2.GT.root1.AND.root2.GE.root3) l1=root2
	IF(root3.GT.root2.AND.root3.GT.root1) l1=root3

	l3 = root1
	IF(root2.LT.root1.AND.root2.LE.root3) l3 = root2
	IF(root3.LT.root2.AND.root3.LT.root1) l3 = root3

	HALFLIFE1 = LOG(2)/l1

	HALFLIFE3 = LOG(2)/l3


	DOWHILE (HALFLIFE1.GT.15.OR.HALFLIFE3.GT.150.OR.HALFLIFE1.LT.1.OR.HALFLIFE3.LT.6) ; 5x "true" half life
		CALL SIMETA(ETA)

		CL    = TVCL  * EXP(ETA(1))
		VC    = TVVC  * EXP(ETA(2))

		VP    = TVVP  * EXP(ETA(4))
		Q     = TVQ  * EXP(ETA(6))

		V3 = TVV3 * EXP(ETA(5))
		Q3 = TVQ3  * EXP(ETA(7))

		K23 = Q / VC
		K32 = Q / VP

		K24 = Q3 / VC
		K42 = Q3 / V3

		K20 = CL / VC

		a0 = K20 * K32 * K42
		a1 = K20 * K42 + K32 * K42 + K32 * K24 + K20 * K32 + K42 * K23
		a2 = K20 + K23 + K24 + K32 + K42

		p1 = a1 - (a2 * a2/3)
		q1 = (2 * a2 * a2 * a2 /27) - (a1 * a2/3) + a0
		r_1 = SQRT(-(p1*p1*p1)/27)
		phi = ACOS((-q1/2)/r_1)/3
		r_2 = 2* EXP(LOG(r_1)/3)

		root1 = -(COS(phi)*r_2-a2/3)
		root2 = -(COS(phi+2*3.141593/3)*r_2-a2/3)
		root3 = -(COS(phi+4*3.141593/3)*r_2-a2/3)

		l1 = root1
		IF(root2.GT.root1.AND.root2.GE.root3) l1=root2
		IF(root3.GT.root2.AND.root3.GT.root1) l1=root3

		l3 = root1
		IF(root2.LT.root1.AND.root2.LE.root3) l3 = root2
		IF(root3.LT.root2.AND.root3.LT.root1) l3 = root3

		HALFLIFE1 = LOG(2)/l1
		HALFLIFE3 = LOG(2)/l3

	ENDDO
ENDIF

KA    = TVKA  * EXP(ETA(3))


S2 = VC/1000 ; dv in µg/l ; amt in mg


IF(NEWIND.LE.1) THEN ; assign negative Cmax Tmax for the new subject
  COM(1)=-1 ; holder of Cmax
  COM(2)=-1 ; holder of Tmax
ENDIF

A_0(5) = 0


$DES
DADT(1) = -KA * A(1)
DADT(2) =  KA * A(1) - K20*A(2) - K23 * A(2) + K32 * A(3) - K24 * A(2) + K42 * A(4)
DADT(3) = K23 * A(2) - K32 * A(3)
DADT(4) = K24 * A(2) - K42 * A(4)
DADT(5) = A(2)/S2

CC = A(2)/S2

IF (S2_SAMPLING.GE.30) THEN
   TDOSE = 216
ELSE
   TDOSE = 0
ENDIF

IF(CC.GT.COM(1).AND.T.GE.TDOSE) THEN
   COM(1)=CC
   COM(2)=T
ENDIF


$ERROR
CMAX	= COM(1)
IF (S2_SAMPLING.GE.30) THEN
   TMAX = COM(2) - 216
ELSE
   TMAX = COM(2)
ENDIF

AUC = A(5)

DEL=0
IF (F.EQ.0) DEL=1
W=(F+DEL)*THETA(8)
Y=F+W*ETA(8)
IPRED=F
IRES=DV-IPRED
IWRES=IRES/W

$THETA
4 ; CL
70 ; V
1 ; KA
50 ; V2
4 ; Q
30 ; V3
4 ; Q3
0.22 ; err prop

$OMEGA STANDARD CORRELATION BLOCK(7)
0.77 ; CL
0 0.77 ; VC
0 0 0.77 ; KA
0 0 0 0.77 ; VP
0 0 0 0 0.77 ; V3
0 0 0 0 0 0.77 ; Q
0 0 0 0 0 0 0.77 ; Q3

$OMEGA 1 FIX

$SIGMA
0 FIX    ; prop


$SIM ONLYSIM (12345 NEW) SUBPROBLEM=1


$TABLE ID TIME EVID DV S2_SAMPLING PRED IPRED CL VC KA VP Q Q3 V3 ETA1 ETA2 ETA3 ETA4 AUC CMAX TMAX NOPRINT NOAPPEND ONEHEADER FILE=run103.tab FORMAT=,
